// SBML level 3 version 1

model main()
  // model units - substance: item, time: second, extent: item

  // Compartments:
  compartment c = 0.01 litre;

  // Species:
  species ATP in c = 0;
  species AMP in c = 0;
  species FTHF10 in c = 0;
  species PPI in c = 0;
  species THF in c = 0;
  species H2O in c = 0;
  species ALA in c = 0;
  species ARG in c = 0;
  species ASP in c = 0;
  species CYS in c = 0;
  species GLY in c = 0;
  species ILE in c = 0;
  species MET in c = 0;
  species PHE in c = 0;
  species PRO in c = 0;
  species SER in c = 0;
  species TRP in c = 0;
  species MG471 in c = 0;
  species aminoacylated_MG471 in c = 0;
  species MG492 in c = 0;
  species aminoacylated_MG492 in c = 0;
  species MG495 in c = 0;
  species aminoacylated_MG495 in c = 0;
  species MG489 in c = 0;
  species aminoacylated_MG489 in c = 0;
  species MG483 in c = 0;
  species aminoacylated_MG483 in c = 0;
  species MG493 in c = 0;
  species aminoacylated_MG493 in c = 0;
  species MG472 in c = 0;
  species aminoacylated_MG472 in c = 0;
  species MG486 in c = 0;
  species aminoacylated_MG486 in c = 0;
  species MG485 in c = 0;
  species aminoacylated_MG485 in c = 0;
  species MG488 in c = 0;
  species met_aminoacylated_MG488 in c = 0;
  species aminoacylated_MG488 in c = 0;
  species MG490 in c = 0;
  species aminoacylated_MG490 in c = 0;
  species MG484 in c = 0;
  species aminoacylated_MG484 in c = 0;
  species MG475 in c = 0;
  species aminoacylated_MG475 in c = 0;
  species MG479 in c = 0;
  species aminoacylated_MG479 in c = 0;
  species MG487 in c = 0;
  species aminoacylated_MG487 in c = 0;
  species MG496 in c = 0;
  species aminoacylated_MG496 in c = 0;
  species MG_292_TETRAMER in c = 0;
  species MG_378_MONOMER in c = 0;
  species MG_036_DIMER in c = 0;
  species MG_253_MONOMER in c = 0;
  species MG_251_DIMER in c = 0;
  species MG_345_MONOMER in c = 0;
  species MG_021_DIMER in c = 0;
  species MG_365_MONOMER in c = 0;
  species MG_194_195_TETRAMER in c = 0;
  species MG_283_DIMER in c = 0;
  species MG_005_DIMER in c = 0;
  species MG_375_DIMER in c = 0;

  // Parameters:
  k = 1 per_second;

  // Reactions:
  MG471_Aminoacylation: ALA + ATP + MG471 => AMP + PPI + aminoacylated_MG471; k*s1*c1;  // modifiers: MG_292_TETRAMER
  MG472_Aminoacylation: ILE + ATP + MG472 => AMP + PPI + aminoacylated_MG472; k*s1*c1;  // modifiers: MG_345_MONOMER
  MG475_Aminoacylation: SER + ATP + MG475 => AMP + PPI + aminoacylated_MG475; k*s1*c1;  // modifiers: MG_005_DIMER
  MG479_Aminoacylation: SER + ATP + MG479 => AMP + PPI + aminoacylated_MG479; k*s1*c1;  // modifiers: MG_375_DIMER
  MG483_Aminoacylation: CYS + ATP + MG483 => AMP + PPI + aminoacylated_MG483; k*s1*c1;  // modifiers: MG_253_MONOMER
  MG484_Aminoacylation: PRO + ATP + MG484 => AMP + PPI + aminoacylated_MG484; k*s1*c1;  // modifiers: MG_283_DIMER
  MG485_Aminoacylation: MET + ATP + MG485 => AMP + PPI + aminoacylated_MG485; k*s1*c1;  // modifiers: MG_021_DIMER
  MG486_Aminoacylation: ILE + ATP + MG486 => AMP + PPI + aminoacylated_MG486; k*s1*c1;  // modifiers: MG_345_MONOMER
  MG487_Aminoacylation: SER + ATP + MG487 => AMP + PPI + aminoacylated_MG487; k*s1*c1;  // modifiers: MG_005_DIMER
  MG488_Aminoacylation: MET + ATP + MG488 => AMP + PPI + met_aminoacylated_MG488; k*s1*c1;  // modifiers: MG_021_DIMER
  MG488_Formyltransferase: met_aminoacylated_MG488 + FTHF10 + H2O => THF + aminoacylated_MG488; k*s1*c1;  // modifiers: MG_365_MONOMER
  MG489_Aminoacylation: ASP + ATP + MG489 => AMP + PPI + aminoacylated_MG489; k*s1*c1;  // modifiers: MG_036_DIMER
  MG490_Aminoacylation: PHE + ATP + MG490 => AMP + PPI + aminoacylated_MG490; k*s1*c1;  // modifiers: MG_194_195_TETRAMER
  MG492_Aminoacylation: ARG + ATP + MG492 => AMP + PPI + aminoacylated_MG492; k*s1*c1;  // modifiers: MG_378_MONOMER
  MG493_Aminoacylation: GLY + ATP + MG493 => AMP + PPI + aminoacylated_MG493; k*s1*c1;  // modifiers: MG_251_DIMER
  MG495_Aminoacylation: ARG + ATP + MG495 => AMP + PPI + aminoacylated_MG495; k*s1*c1;  // modifiers: MG_378_MONOMER
  MG496_Aminoacylation: TRP + ATP + MG496 => AMP + PPI + aminoacylated_MG496; k*s1*c1;  // modifiers: MG_126_DIMER
  MG497_Aminoacylation: ARG + ATP + MG497 => AMP + PPI + aminoacylated_MG497; k*s1*c1;  // modifiers: MG_378_MONOMER
  MG499_Aminoacylation: GLY + ATP + MG499 => AMP + PPI + aminoacylated_MG499; k*s1*c1;  // modifiers: MG_251_DIMER
  MG500_Aminoacylation: LEU + ATP + MG500 => AMP + PPI + aminoacylated_MG500; k*s1*c1;  // modifiers: MG_266_MONOMER
  MG501_Aminoacylation: LYS + ATP + MG501 => AMP + PPI + aminoacylated_MG501; k*s1*c1;  // modifiers: MG_136_DIMER
  MG502_Aminoacylation: GLU + ATP + MG502 => AMP + PPI + GLU_aminoacylated_MG502; k*s1*c1;  // modifiers: MG_295_MONOMER
  MG502_Amidotransferase: GLU_aminoacylated_MG502 + ATP + GLN => ADP + PI + GLU + aminoacylated_MG502; k*s1*c1;  // modifiers: MG_462_MONOMER
  MG503_Aminoacylation: TYR + ATP + MG503 => AMP + PPI + aminoacylated_MG503; k*s1*c1;  // modifiers: MG_455_DIMER
  MG504_Aminoacylation: TRP + ATP + MG504 => AMP + PPI + aminoacylated_MG504; k*s1*c1;  // modifiers: MG_126_DIMER
  MG506_Aminoacylation: SER + ATP + MG506 => AMP + PPI + aminoacylated_MG506; k*s1*c1;  // modifiers: MG_005_DIMER
  MG507_Aminoacylation: SER + ATP + MG507 => AMP + PPI + aminoacylated_MG507; k*s1*c1;  // modifiers: MG_005_DIMER
  MG508_Aminoacylation: LEU + ATP + MG508 => AMP + PPI + aminoacylated_MG508; k*s1*c1;  // modifiers: MG_266_MONOMER
  MG509_Aminoacylation: LYS + ATP + MG509 => AMP + PPI + aminoacylated_MG509; k*s1*c1;  // modifiers: MG_136_DIMER
  MG510_Aminoacylation: THR + ATP + MG510 => AMP + PPI + aminoacylated_MG510; k*s1*c1;  // modifiers: MG_375_DIMER
  MG511_Aminoacylation: VAL + ATP + MG511 => AMP + PPI + aminoacylated_MG511; k*s1*c1;  // modifiers: MG_334_MONOMER
  MG512_Aminoacylation: THR + ATP + MG512 => AMP + PPI + aminoacylated_MG512; k*s1*c1;  // modifiers: MG_375_DIMER
  MG513_Aminoacylation: GLU + ATP + MG513 => AMP + PPI + aminoacylated_MG513; k*s1*c1;  // modifiers: MG_462_MONOMER
  MG514_Aminoacylation: ASN + ATP + MG514 => AMP + PPI + aminoacylated_MG514; k*s1*c1;  // modifiers: MG_113_DIMER
  MG518_Aminoacylation: HIS + ATP + MG518 => AMP + PPI + aminoacylated_MG518; k*s1*c1;  // modifiers: MG_035_DIMER
  MG519_Aminoacylation: LEU + ATP + MG519 => AMP + PPI + aminoacylated_MG519; k*s1*c1;  // modifiers: MG_266_MONOMER
  MG520_Aminoacylation: LEU + ATP + MG520 => AMP + PPI + aminoacylated_MG520; k*s1*c1;  // modifiers: MG_266_MONOMER
  MG523_Aminoacylation: ARG + ATP + MG523 => AMP + PPI + aminoacylated_MG523; k*s1*c1;  // modifiers: MG_378_MONOMER

  // Unit definitions:
  unit per_second = 1 / second;
end
